# [component: outputs y_ж]
σ := 0.5
η := 0.1
i := 0 .. 200
x[i] := 0.01*i - 1
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y_ж = [
    5.28051; 4.98699; 4.92012; 4.51443; 3.98404; 4.68864; 4.4498; 4.6348; 5.30213; 4.46342
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]
c := [-0.8; -0.6; -0.4; -0.2; 0; 0.2; 0.4; 0.6; 0.8]
w_i := [0.5; 0.5; 0.5; 0.5; 0.5; 0.5; 0.5; 0.5; 0.5]
x = [
    -1; -0.99; -0.98; -0.97; -0.96; -0.95; -0.94; -0.93; -0.92; -0.91
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]
net(x, c) := e^(-1/(2*σ)*(c - x)^2)
N := net(x[0], c) = [0.960789; 0.852144; 0.697676; 0.527292; 0.367879; 0.236928; 0.140858; 0.0773047; 0.0391639]
y := N*w_i = 1.95002
δ := y_ж[0] - y = 3.3305
Δw_i := η*δ*N = [0.319991; 0.283806; 0.232361; 0.175615; 0.122522; 0.0789087; 0.0469128; 0.0257463; 0.0130435]
w_cor := w_i + Δw_i = [0.819991; 0.783806; 0.732361; 0.675615; 0.622522; 0.578909; 0.546913; 0.525746; 0.513044]
# |
# |
# |
# |
# |
# |
# |
# |
# |
# |
# |
# |
# |
# |
# |
# |
# |
# |
# |
# |
# |
# |
# |
# |
# |
# |
# |
# |
# |
# |
# |
# |
# |
# |
# |
# |
# |
m := 2000
w_ii :=
    for j ∈ 0 .. m
        for i ∈ 0 .. 200
            N ← net(x[i], c)
            y ← N*w_i
            δ ← y_ж[i] - y
            Δw_i ← η*δ*N
            w_cor ← w_i + Δw_i
            w_ii ← w_cor
            w_i ← w_ii
n := 1000
w_i :=
    for j ∈ 0 .. n
        for i ∈ 0 .. 200
            N ← net(x[i], c)
            y ← N*w_i
            δ ← y_ж[i] - y
            Δw_i ← η*δ*N
            w_cor ← w_i + Δw_i
            w_i ← w_cor
w_ii = [23.3895; -3.64387; -16.4415; -13.7186; -1.05009; 11.7465; 15.2517; 4.76956; -17.7899]
w_i = [21.4027; -3.78619; -15.1619; -12.0588; -0.273865; 10.9121; 13.3188; 3.60258; -15.6793]
X := -1, -0.99 .. 1
X := -1, -0.99 .. 1
F(X, c, w_i) := sum(net(X, c)[h]*w_i[h], h = 0 .. 8)  # Результат аппроксимации
F(X, c, w_i) = [
    4.4256; 4.352; 4.27695; 4.20051; 4.12273; 4.0437; 3.96345; 3.88207; 3.79962; 3.71617
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]
F(X, c, w_ii) = [
    4.87979; 4.79654; 4.71164; 4.62516; 4.53717; 4.44772; 4.3569; 4.26478; 4.17143; 4.07693
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]
F(X, c, w_ii) := sum(net(X, c)[h]*w_ii[h], h = 0 .. 8)  # Результат аппроксимации
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