η := 0.5
r := 0
w_0 := [0.5, 0.4; 0.6, 0.2; 0.8, 0.5]
v_0 := [0.8; 0.7; 0.4]
v_1 := [0.6; 0.9; 0.9]
v_2 := [0.3; 0.4; 0.1]
v_3 := [0.1; 0.1; 0.3]
d(p, k) := sum((w_0[i, k] - p[i, 0])^2, i = 0 .. 2)
w_new0(v, w) := w + η*[v[0] - w[0, 0], 0; v[1] - w[1, 0], 0; v[2] - w[2, 0], 0]
w_new1(v, w) := w + η*[0, v[0] - w[0, 1]; 0, v[1] - w[1, 1]; 0, v[2] - w[2, 1]]
# Для кластерного элемента 1 | Для кластерного элемента 2
# Вектор 1:
d(v_0, 0) = 0.26  # <
d(v_0, 1) = 0.42
w_1 := w_new0(v_0, w_0) = [0.65, 0.4; 0.65, 0.2; 0.6, 0.5]
# Вектор 2:
d(v_1, 0) = 0.11  # <
d(v_1, 1) = 0.69
w_2 := w_new0(v_1, w_1) = [0.625, 0.4; 0.775, 0.2; 0.75, 0.5]
# Вектор 3:
d(v_2, 0) = 0.57  # >
d(v_2, 1) = 0.21
w_3 := w_new1(v_2, w_2) = [0.625, 0.35; 0.775, 0.3; 0.75, 0.3]
# Вектор 4:
d(v_3, 0) = 0.66  # >
d(v_3, 1) = 0.14
w_4 := w_new1(v_3, w_3) = [0.625, 0.225; 0.775, 0.2; 0.75, 0.3]
